# OpenSim document version 40000
InverseKinematicsTool:
  results_directory: ./
  model_file: Model_Pose2Sim_Halpe68_136_scaled.osim
  constraint_weight: Inf
  accuracy: 1e-5
  time_range: 0.01666667 0.7
  output_motion_file: Balancing_for_IK.mot
  report_errors: true
  marker_file: Balancing_for_IK.trc
  report_marker_locations: false
  IKTaskSet:
    IKMarkerTask Nose: apply=true weight=0.1
    IKMarkerTask Head: apply=true weight=0.1
    IKMarkerTask Neck: apply=true weight=0.2
    IKMarkerTask LShoulder: apply=true weight=2
    IKMarkerTask RShoulder: apply=true weight=2
    IKMarkerTask LElbow: apply=true weight=1
    IKMarkerTask RElbow: apply=true weight=1
    IKMarkerTask LWrist: apply=true weight=1
    IKMarkerTask RWrist: apply=true weight=1
    IKMarkerTask Hip: apply=true weight=1
    IKMarkerTask LHip: apply=true weight=2
    IKMarkerTask RHip: apply=true weight=2
    IKMarkerTask LKnee: apply=true weight=1
    IKMarkerTask RKnee: apply=true weight=1
    IKMarkerTask LAnkle: apply=true weight=1
    IKMarkerTask RAnkle: apply=true weight=1
    IKMarkerTask LBigToe: apply=true weight=1
    IKMarkerTask LSmallToe: apply=true weight=1
    IKMarkerTask LHeel: apply=true weight=1
    IKMarkerTask RBigToe: apply=true weight=1
    IKMarkerTask RSmallToe: apply=true weight=1
    IKMarkerTask RHeel: apply=true weight=1
    IKMarkerTask RThumb: apply=true weight=0.2
    IKMarkerTask RIndex: apply=true weight=0.2
    IKMarkerTask RPinky: apply=true weight=0.2
    IKMarkerTask LThumb: apply=true weight=0.2
    IKMarkerTask LIndex: apply=true weight=0.2
    IKMarkerTask LPinky: apply=true weight=0.2
    IKCoordinateTask L5_S1_Flex_Ext: apply=true weight=1 value_type=default_value value=0
